# Worksheet setting: ORIGIN = 1
# RED NEURONAL (MLP) PARA CLASIFICACION DE SUELOS
# Red neural (MLP): 5 entradas -> 4 neuronas ocultas -> 4 salidas. Clasifica el suelo en Arcilla / Limo / Arena / Grava a partir de ensayos de laboratorio.
# 1. Entradas y normalización
finos := 68  # Pasa Tamiz N.200 (%)
LL := 42  # Limite liquido (%)
IP := 24  # Índice plástico (%)
hum := 18  # Humedad natural (%)
SPT := 9  # SPT (golpes)
# Normalizamos a una escala comparable:
x_1 := finos/100 = 0.68
x_2 := LL/100 = 0.42
x_3 := IP/50 = 0.48
x_4 := hum/50 = 0.36
x_5 := SPT/50 = 0.18
# Vector de entrada normalizado:
X := [x_1; x_2; x_3; x_4; x_5] = [0.68; 0.42; 0.48; 0.36; 0.18]
# 2. Pesos del modelo
# Capa oculta W1 (4x5) y bias b1; capa de salida W2 (4x4) y bias b2. Pesos didácticos (en un modelo real se aprenden entrenando).
# (Los pesos y el bias son DATOS de entrada del modelo -> recuadro azul.)
# W1 (filas h1..h4, columnas x1..x5):
W1 := [
    1.0, 1.1, 2.2, 0.2, -0.3;
    1.0, 0.8, -1.8, 0.2, -0.2;
    -2.2, -0.6, -0.9, -0.2, 0.3;
    -0.2, -0.1, -0.1, -1.0, 2.0
]
b1 := [-1.2; -0.3; 1.1; 0.2]
# W2 (filas Arcilla/Limo/Arena/Grava, columnas h1..h4):
W2 := [3.2, -1.0, -1.5, 0.1; -0.7, 2.3, -1.0, -0.1; -1.2, -0.6, 2.1, 0.4; -1.5, -1.0, 1.4, 1.2]
b2 := [0.9; 0.0; -0.1; -0.2]
# 3. Capa oculta (forward pass - hacia adelante)
# z = W1.X + b1 ; activación a = sigma(z) = 1 / (1 + e^-z)
# Función de activación sigmoide:
# Función matemática que convierte cualquier valor entre 0 y 1
σ(z) := 1/(1 + exp(-z))
Z1 := W1*X + b1
# Suma ponderada de la capa oculta:
Z1 = [1.016; -0.112; -1.098; -0.026]
# Activaciones (h1 plasticidad, h2 limosidad, h3 granularidad, h4 consistencia):
H := [σ(Z1[1, 1]); σ(Z1[2, 1]); σ(Z1[3, 1]); σ(Z1[4, 1])] = [0.734193; 0.472029; 0.250115; 0.4935]
# 4. Capa de salida (softmax - capa de salida)
# Logits s = W2.H + b2 ; probabilidades = softmax(s) = e^s / suma(e^s)
S := W2*H + b2
# Logits:
S = [2.45157; 0.272267; -0.541608; -0.830957]
# Denominador del softmax (suma de exponenciales):
den := exp(S[1, 1]) + exp(S[2, 1]) + exp(S[3, 1]) + exp(S[4, 1]) = 13.9369
P := [exp(S[1, 1])/den; exp(S[2, 1])/den; exp(S[3, 1])/den; exp(S[4, 1])/den]
P = [0.83279; 0.094206; 0.0417462; 0.0312575]  # Probabilidades (Arcilla, Limo, Arena, Grava):
# La mayor probabilidad es Arcilla (~0.833) -> Clase predicha: ARCILLA.
# 5. Interpretación geotécnica SUCS
# Finos = 68% > 50% -> suelo fino. Linea A: IP_A = 0.73 (LL - 20).
# Índice plástico de la línea A:
IP_A := 0.73*(LL - 20) = 16.06
# IP - IP_A (si > 0 el punto esta sobre la línea A):
dif := IP - IP_A = 7.94
# IP = 24 > IP_A = 16.06 y LL = 42 < 50  ->  SUCS estimado: CL (Arcilla de baja plasticidad). Coincide con la predicción de la red.
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